// COMSOL Multiphysics 6.0.0.318 model "mphtest.mph"
// Outline of the model tree

Common definitions
  mpf1: ParticipationFactors "参与因子 1"

Geometry
  geom1 "几何 1" (3D, length unit nm)
    blk1: Block "长方体 1" | size = {1, 2, 5}
    fin: Finalize "形成联合体"

Materials
  mat2: Common "Fe - 2 Mn - 1.3 Si - 0.7 Cr - 0.4 C [solid]" on domains 1
    def "基本"
      thermalexpansioncoefficient = (alpha(T)+(Tempref-293[K])*if(abs(T-Tempref)>1e-3,(alpha(T)-alpha(Tempref))/(T-Tempref),d(alpha(T),T)))/(1+alpha(Tempref)*(Tempref-293[K]))
      heatcapacity = C(T)
      density = rho(T)
      alpha: Piecewise
        arg = T
        pieces = 
          {0.0, 680.0, 6.731035E-6+3.918624E-8*T^1-1.534406E-10*T^2+3.517965E-13*T^3-3.827522E-16*T^4+1.565546E-19*T^5}
          {680.0, 977.0, 8.614185E-6+1.013631E-8*T^1-2.26181E-12*T^2-1.569696E-15*T^3}
          {977.0, 1061.0, 6.292031E-5-4.915637E-8*T^1}
          {1061.0, 1144.0, -1.563678E-6+1.162025E-8*T^1}
        argunit = K
        fununit = 1/K
      C: Piecewise | arg = T; pieces = {293.0, 948.0, 516.845754-0.379149812*T^1+9.43230918E-4*T^2-2.74565251E-7*T^3}; argunit = K; fununit = J/(kg*K)
      rho: Piecewise
        arg = T
        pieces = 
          {0.0, 60.0, 7907.978-0.01549395*T^1}
          {60.0, 977.0, 7911.3-0.01678428*T^1-8.018711E-4*T^2+1.172796E-6*T^3-1.015971E-9*T^4+3.677737E-13*T^5}
          {977.0, 1061.0, 7116.994+0.5195388*T^1}
          {1061.0, 1144.0, 8166.523-0.4696497*T^1}
        argunit = K
        fununit = kg/m^3
    ThermalExpansion "热膨胀"
      alphatan = CTE(T)
      dL = (dL(T)-dL(Tempref))/(1+dL(Tempref))
      dL: Piecewise
        arg = T
        pieces = 
          {0.0, 50.0, -0.002022973+3.918919E-7*T^1}
          {50.0, 212.0, -0.002063267-3.508062E-7*T^1+2.838477E-8*T^2}
          {212.0, 977.0, -0.00252395773+5.644256E-6*T^1+1.0799E-8*T^2-1.801872E-12*T^3-1.569701E-15*T^4}
          {977.0, 1061.0, 0.03264232-2.297313E-5*T^1}
          {1061.0, 1144.0, -0.01351301+2.053771E-5*T^1}
        argunit = K
      CTE: Piecewise | arg = T; pieces = {293.0, 1065.0, 5.044861E-6+2.5188E-8*T^1-1.418195E-11*T^2}; argunit = K; fununit = 1/K
    Enu "杨氏模量和泊松比"
      E = E(T)
      nu = nu(T)
      E: Piecewise
        arg = T
        pieces = 
          {4.0, 273.0, 2.217366E11+5020008.0*T^1-305140.4*T^2+926.6601*T^3-1.145454*T^4}
          {273.0, 1050.0, 2.109875E11+3.572844E7*T^1-106319.6*T^2}
          {1050.0, 1500.0, 2.024261E11-6.77381E7*T^1}
        argunit = K
        fununit = Pa
      nu: Piecewise
        arg = T
        pieces = 
          {4.0, 120.0, 0.2850355-1.662951E-6*T^1}
          {120.0, 273.0, 0.2848011-7.147353E-6*T^1+6.558945E-8*T^2}
          {273.0, 1053.0, 0.2712267+7.030261E-5*T^1-3.856929E-8*T^2+1.246582E-11*T^3}
          {1053.0, 1500.0, 0.3165268-1.242823E-6*T^1+1.661461E-9*T^2}
        argunit = K
    KG "体积模量和剪切模量"
      K = kappa(T)
      G = mu(T)
      mu: Piecewise
        arg = T
        pieces = 
          {4.0, 273.0, 8.626526E10+1636497.0*T^1-108981.6*T^2+291.1261*T^3-0.3377859*T^4}
          {273.0, 1050.0, 8.301552E10+9184755.0*T^1-38834.5*T^2}
          {1050.0, 1500.0, 7.694034E10-2.580357E7*T^1}
        argunit = K
        fununit = Pa
      kappa: Piecewise
        arg = T
        pieces = 
          {4.0, 100.0, 1.800573E11-3478717.0*T^1+151512.1*T^2-5485.327*T^3+28.28329*T^4}
          {100.0, 273.0, 1.818111E11-4.023792E7*T^1+84204.68*T^2-93.09453*T^3}
          {273.0, 1500.0, 1.842649E11-2.509462E7*T^1-28588.37*T^2}
        argunit = K
        fununit = Pa

Physics
  solid: SolidMechanics "固体力学" on all domains
    dependent variable u = {u, v, w}
    lemm1: LinearElasticModel "线弹性材料 1" (default)
    free1: Free "自由 1" (default)
    init1: init "初始值 1" (default)
    fix1: Fixed "固定约束 1" on boundaries 3, 4

Mesh
  mesh1 "网格 1" (physics-controlled)
    size: MeshSizeDefault "大小" | hauto = 2

Studies
  std1 "研究 1"
    eig: Eigenfrequency "特征频率" | shift = 1[Hz]; conrad = 1

Solver configurations
  sol1 "解 1" (study std1)
    v1: Variables "因变量 1"
    e1: Eigenvalue "特征值求解器 1" | eigvfunscale = maximum; eigvfunscaleparam = 5.48E-7
      dDef: Direct "直接"

Datasets
  dset1: Solution | solution = sol1

Derived values
  gev1: EvalGlobal "全局计算 1"
    data = dset1
    table = tbl1
    expr = {solid.Q_eig, solid.Wh_tot, solid.Wk_tot}
    descr = {特征值质量因子, 总储能, 总动能}

Evaluation groups
  std1EvgFrq: EvaluationGroup "特征频率 (研究 1)" | data = dset1
    gev1: EvalGlobal "全局计算 1"
      expr = {freq*2*pi, imag(freq)/abs(freq), abs(freq)/imag(freq)/2}
      unit = {rad/s, 1, 1}
      descr = {角频率, 阻尼比, 品质因子}
  std1mpf1: EvaluationGroup "参与因子 (研究 1)" | data = dset1
    gev1: EvalGlobal "全局计算 1"
      expr = {mpf1.pfLnormX, mpf1.pfLnormY, mpf1.pfLnormZ, mpf1.pfRnormX, mpf1.pfRnormY, mpf1.pfRnormZ, mpf1.mEffLX, mpf1.mEffLY, mpf1.mEffLZ, mpf1.mEffRX, mpf1.mEffRY, mpf1.mEffRZ}
      unit = {1, 1, 1, 1, 1, 1, kg, kg, kg, kg*m^2, kg*m^2, kg*m^2}
      descr = {参与因子，归一化，X 平移, 参与因子，归一化，Y 平移, 参与因子，归一化，Z 平移, 参与因子，归一化，X 旋转, 参与因子，归一化，Y 旋转, 参与因子，归一化，Z 旋转, 有效模态质量，X 平移, 有效模态质量，Y 平移, 有效模态质量，Z 平移, 有效模态质量，X 旋转, 有效模态质量，Y 旋转, 有效模态质量，Z 旋转}

Tables
  tbl1: Table "表格 1"
    // 全局计算 1
    特征频率 (Hz) | 特征值质量因子 (1) | 特征值质量因子 (1) | 总储能 (J) | 总动能 (J)
    1771.01 | 2.50571e+19 | 2.50571e+19 | 0.000287807 | 0.000287807
    2477.26 | 3.50494e+19 | 3.50494e+19 | 0.000641926 | 0.000641926
    2637 | 3.73096e+19 | 3.73096e+19 | 0.000317049 | 0.000317049
    4053.58 | 5.7352e+19 | 5.7352e+19 | 0.00161022 | 0.00161022
    5001.73 | 7.07668e+19 | 7.07668e+19 | 0.00302071 | 0.00302071
    5262.82 | 7.44609e+19 | 7.44609e+19 | 0.00302953 | 0.00302953

Plots
  pg1: PlotGroup3D "振型 (solid)" | data = dset1
    surf1: Surface "表面 1" | expr = solid.disp
      def: Deform "变形" | expr = {u, v, w}; descr = 位移场

Exports
  img1: Image "图像 1"
    sourceobject = pg1
    size = current
    unit = px
    width = 800
    height = 600
    pngfilename = F:\神奇的作品存档（临时）\仿真\毕业设计\1.png